// COMSOL Multiphysics 5.6.0.401 model "flow.mph.mph"
// Outline of the model tree

Parameters
  legWidth = 13[mm]
  legHeight = 24[cm]
  firstLegX = -10.5[cm]
  secondLegX = 10.5[cm]
  elipse1A = (secondLegX-firstLegX+legWidth)/2
  elipse1B = 8[cm]
  elipse2A = (secondLegX-firstLegX-legWidth)/2
  elipse2B = elipse1B-legWidth
  Q = 50[dm^3/min]
  R = 6[mm]

Variables
  var1 "Variables 1"
    S = pi*(R^2)
    Vin = Q/S

Geometry
  geom1 "Geometry 1" (2D, length unit m)
    r1: Rectangle "firstLeg" | pos = {firstLegX, 0.12}; base = center; size = {legWidth, legHeight}
    r2: Rectangle "secondLeg" | pos = {secondLegX, 0.12}; base = center; size = {legWidth, legHeight}
    e1: Ellipse "elipse1" | semiaxes = {elipse1A, elipse1B}
    e2: Ellipse | semiaxes = {elipse2A, elipse2B}
    r3: Rectangle | pos = {0, elipse1B/2}; base = center; size = {elipse1A*2, elipse1B}
    dif1: Difference | input = e1; input2 = e2, r3
    fin: Finalize "Form Union"

Materials
  mat1: Common "Air" on domains 1-3
    def "Basic"
      thermalexpansioncoefficient = alpha_p(pA,T)
      molarmass = 0.02897[kg/mol]
      bulkviscosity = muB(T)
      dynamicviscosity = eta(T)
      ratioofspecificheat = 1.4
      electricconductivity = 0[S/m]
      heatcapacity = Cp(T)
      density = rho(pA,T)
      thermalconductivity = k(T)
      soundspeed = cs(T)
      eta: Piecewise | arg = T; pieces = {200.0, 1600.0, -8.38278E-7+8.35717342E-8*T^1-7.69429583E-11*T^2+4.6437266E-14*T^3-1.06585607E-17*T^4}; argunit = K; fununit = Pa*s
      Cp: Piecewise | arg = T; pieces = {200.0, 1600.0, 1047.63657-0.372589265*T^1+9.45304214E-4*T^2-6.02409443E-7*T^3+1.2858961E-10*T^4}; argunit = K; fununit = J/(kg*K)
      rho: Analytic | expr = pA*0.02897/R_const[K*mol/J]/T; args = {pA, T}; dermethod = manual; argders = {{pA, d(pA*0.02897/R_const/T,pA)}, {T, d(pA*0.02897/R_const/T,T)}}; argunit = Pa,K; fununit = kg/m^3
      k: Piecewise | arg = T; pieces = {200.0, 1600.0, -0.00227583562+1.15480022E-4*T^1-7.90252856E-8*T^2+4.11702505E-11*T^3-7.43864331E-15*T^4}; argunit = K; fununit = W/(m*K)
      cs: Analytic | expr = sqrt(1.4*R_const[K*mol/J]/0.02897*T); args = T; dermethod = manual; argunit = K; fununit = m/s
      an1: Analytic | funcname = alpha_p; expr = -1/rho(pA,T)*d(rho(pA,T),T); args = {pA, T}; argunit = Pa, K; fununit = 1/K
      an2: Analytic "Analytic 2a" | funcname = muB; expr = 0.6*eta(T); args = T; argunit = K; fununit = Pa*s
    NonlinearModel
      BA = (def.gamma+1)/2
    idealGas
      Rs = R_const/Mn
      heatcapacity = Cp(T)
      ratioofspecificheat = 1.4
      molarmass = 0.02897
      Cp: Piecewise | arg = T; pieces = {200.0, 1600.0, 1047.63657-0.372589265*T^1+9.45304214E-4*T^2-6.02409443E-7*T^3+1.2858961E-10*T^4}; argunit = K; fununit = J/(kg*K)

Physics
  spf: LaminarFlow on all domains
    dependent variable u = {u, v, w}
    PhysicalModelProperty.Compressibility = CompressibleMALT03
    fp1: FluidProperties (default) | minput_temperature = 293.13[K]
    init1: init "Initial Values 1" (default)
    wallbc1: WallBC "Wall 1" (default)
    inl1: InletBoundary "Inlet 1" on boundaries 3 | BoundaryCondition = FullyDevelopedFlow; Uavfdf = Vin
    out1: OutletBoundary "Outlet 1" on boundaries 7
      BoundaryCondition = Pressure
      multipleInlets = 0
      FullyDevelopedFlowOption = Uav
      Uavfdf = Vin

Mesh
  mesh1 "Mesh 1" (physics-controlled)
    size: MeshSizeDefault | table = cfd; hauto = 3

Studies
  std1 "Study 1"
    stat: Stationary

Solver configurations
  sol1 "Solution 1" (study std1)
    v1: Variables "Dependent Variables 1"
    s1: Stationary "Stationary Solver 1"
      fc1: FullyCoupled | linsolver = d1; initstep = 0.01; maxiter = 100
      d1: Direct "Direct, fluid flow variables (spf)" | linsolver = pardiso; pivotperturb = 1.0E-13

Datasets
  dset1: Solution | solution = sol1

Plots
  pg1: PlotGroup2D "Velocity (spf)" | data = dset1
    surf1: Surface | expr = spf.U
  pg2: PlotGroup2D "Pressure (spf)" | data = dset1
    con1: Contour (disabled) | expr = p; unit = dPa; levelrounding = off
    surf1: Surface | expr = p
  pg3: PlotGroup1D "1D Plot Group 3" | data = dset1
    lngr1: LineGraph on boundaries 1, 3-5, 7-12 | expr = spf.U
    lngr2: LineGraph on boundaries 1, 3-5, 7-12 | expr = p